i := 1 .. 8
t[i] := 0.1, 0.5, 1, 2, 5, 10, 20, 50
G := 10
τ0 := 5
λ := 5
γ[i] := τ0/G*(1 - exp(-t[i]/λ))
τ0/G = 0.5
τ0 = 5  # Pa
γ[i] = [0.00990066; 0.0475813; 0.0906346; 0.16484; 0.31606; 0.432332; 0.490842; 0.499977]
t[i] = [0.1; 0.5; 1; 2; 5; 10; 20; 50]
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G := τ0/0.5
G = 10
y[i] := ln(0.5 - γ[i])
s := slope(t, y)
s = -0.203162
yp[i] := ln(0.5) + s*t[i]
λ := -1/s
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λ = 4.92218
μ := λ*G
μ = 49.2218  # Pa.s
